@Author Helfer Thomas;
@Date 23/09/2016;

@UseCastemAccelerationAlgorithm true;
@MaximumNumberOfSubSteps 1;
@ModellingHypothesis 'Axisymmetrical';

@Behaviour<umat> './src/libUmatBehaviour.so' 'umatimplicitsimomieheelastoplasticity';
@MaterialProperty<constant> 'YoungModulus'     200.e9;
@MaterialProperty<constant> 'PoissonRatio'       0.3;
@MaterialProperty<constant> 's_y' 200e6;
@MaterialProperty<constant> 'ET'  20e9;

@ImposedDeformationGradient 'FZZ' {0:1.,1.:1.7};
@ImposedDeformationGradient 'FRZ' 0.;
@ImposedDeformationGradient 'FZR' 0.;

// Initial value of the elastic strain
@InternalStateVariable 'be' {1.,1.,1.,0.};

@ExternalStateVariable 'Temperature' 293.15;

@Times {0.,1 in 10};
