@Parser IsotropicMisesCreep;
@Behaviour Norton;
@Author Helfer Thomas;
@Date 23/11/06;

@UMATFiniteStrainStrategies[castem] {None,
    MieheApelLambrechtLogarithmicStrain,
    LogarithmicStrain1D};

@MaterialProperty real A;
@MaterialProperty real E;

@FlowRule{
  const real tmp = A*pow(seq,E-1.);
  f       = tmp*seq;
  df_dseq = E*tmp;
}
