'OPTION' 'EPSI' 'LINEAIRE' ;
INCREPL = 'TEXT' MEPL ;
*****************************************************
*                                                   *
*        TEST DE VALIDATION DE LA LOI               *
*        D'ENDOMMAGEMENT DUCTILE DE                 *
*                ROUSSELIER                         *
*                                                   *
*  TEST:                                            *
*    UN BARREAU EST CHARGE EN TRACTION              *
*    LE CHARGEMENT EST DES DEPLACEMENTS IMPOSES     *
*    CALCUL EN MASSIF 3D                            *
*                                                   *
*  MAILLAGE:                                        *
*    UN BARREAU DE SECTION CARREE DE .5 M SUR .01 M *
*    50 ELEMENTS                                    *
*                                                   *
*****************************************************
*                                                                     *
* IDES1  = VRAI : trace des resultats :                               *
IDES1    = FAUX ;
*                                                                     *
opti echo 0 ;
*
'DEBPROC' PLROUSS ta1*'TABLE' beta0*'FLOTTANT'
               xm0*'FLOTTANT' sig0*'FLOTTANT'
               bet1*'FLOTTANT' def1*'FLOTTANT'
               sig1*'FLOTTANT' i1*'ENTIER' ;
*
*  nombre d'it�rations
*
niter = 1 ;
*
t0 = ta1 .'TEMPS'.i1 ;
t1 = ta1 .'TEMPS'.( i1 - 1 ) ;
dt0 = ( t0 - t1 ) / niter ;
mat0 = ta1 .'CARACTERISTIQUES' ;
mod0 = ta1. 'MODELE' ;
depl0 = ta1 .'DEPLACEMENTS'.i1 ;
depl1 = ta1 .'DEPLACEMENTS'.( i1 - 1 ) ;
youn0 = 'MAXI' ( 'EXCO' mat0 'YOUN' ) ;
xnu = 'MAXI' ( 'EXCO' mat0 'NU' ) ;
F0 = 'MAXI' ( 'EXCO' mat0 'F' ) ;
XD0 = 'MAXI' ( 'EXCO' mat0 'D' ) ;
SIG = 'MAXI' ( 'EXCO' mat0 'SIG1' ) ;
epst = 'EPSI' mod0 depl0 ;
epstold = 'EPSI' mod0 depl1 ;
def_x = 'MAXI' ( 'EXCO' epst 'EPXX' ) ;
def_y = 'MAXI' ( 'EXCO' epst 'EPYY' ) ;
def_z = 'MAXI' ( 'EXCO' epst 'EPZZ' ) ;
def_xold = 'MAXI' ( 'EXCO' epstold 'EPXX' ) ;
def_yold = 'MAXI' ( 'EXCO' epstold 'EPYY' ) ;
def_zold = 'MAXI' ( 'EXCO' epstold 'EPZZ' ) ;
def00 = ( def_x - def_xold ) / niter ;
XK0 = youn0 / ( 3. * ( 1. - ( 2. * xnu ) ) ) ;
*
*  trace de la d�formation totale
*
treps1 = def_x + def_y + def_z ;
trepsold = def_xold + def_yold + def_zold ;
treps00 = ( treps1 - trepsold ) / niter ;
*
def_int = def1 ;
bet_int = bet1 ;
sig_int = sig1 ;
*
'REPETER' bloc1 niter ;
i10 = &bloc1 ;
*
treps0 = trepsold + ( i10 * treps00 ) ;
def0 = def_xold + ( i10 * def00 ) ;
*
x0 = def_int ;
x2 = x0 ;
sigt = ( youn0 * ( def0 - x2 ) ) - sig_int ;
cont0 = ( youn0 * ( def0 - x2 ) ) ;
cont0 = cont0 / 3. ;
dpeq1 = XD0 * ( 'EXP' ( cont0 / SIG ) ) ;
*bet2 = bet_int +
*( ( x2 - def_int ) * dpeq1 ) +
*( ( ( x2 - def_int ) * ( x2 - def_int ) / 2. ) *
*dpeq1 * sigt / ( 3. * SIG ) ) ;
tr2 = ( 1. - ( 2. * xnu ) ) * ( def0 - x2 ) ;
tr1 = treps0 - tr2 ;
'SI' ( tr1 '>' 1.E-5 ) ;
bet2 = 'LOG' ( ( ( 'EXP' tr1 ) - 1. + F0 ) / F0 ) ;
'SINON' ;
bet2 = tr1 / F0 ;
'FINSI' ;
B1 = SIG * F0 * ( 'EXP' bet2 ) ;
B1 = B1 / ( 1. - F0 + ( F0 * ( 'EXP' bet2 ) ) ) ;
tr1 = tr1 / 3. ;
y2 = sig0 * ( ( 1. + ( beta0 * ( x2 - tr1 ) ) ) ** xm0 ) ;
y2 = y2 -
( B1 * XD0 * ( 'EXP' ( youn0 * ( def0 - x2 )
/ ( SIG * 3. ) ) ) ) ;
y2 = y2 - ( youn0 * ( def0 - x2 ) ) ;
y0 = y2 ;
*
* Cas �lastique
*
'SI' ( y0 '>' 0. ) ;
   def_th0 = def_int ;
   bet_th0 = bet_int ;
   sig_th0 = youn0 * ( def0 - def_th0 ) ;
   'ITERER' bloc1 ;
'FINSI' ;
*
x1 = def0 ;
x2 = x1 ;
sigt = ( youn0 * ( def0 - x2 ) ) - sig_int ;
cont0 = ( youn0 * ( def0 - x2 ) ) ;
cont0 = cont0 / 3. ;
dpeq1 = XD0 * ( 'EXP' ( cont0 / SIG ) ) ;
tr2 = ( 1. - ( 2. * xnu ) ) * ( def0 - x2 ) ;
tr1 = treps0 - tr2 ;
'SI' ( tr1 '>' 1.E-5 ) ;
bet2 = 'LOG' ( ( ( 'EXP' tr1 ) - 1. + F0 ) / F0 ) ;
'SINON' ;
bet2 = tr1 / F0 ;
'FINSI' ;
B1 = SIG * F0 * ( 'EXP' bet2 ) ;
B1 = B1 / ( 1. - F0 + ( F0 * ( 'EXP' bet2 ) ) ) ;
tr1 = tr1 / 3. ;
y2 = sig0 * ( ( 1. + ( beta0 * ( x2 - tr1 ) ) ) ** xm0 ) ;
y2 = y2 -
( B1 * XD0 * ( 'EXP' ( youn0 * ( def0 - x2 )
/ ( SIG * 3. ) ) ) ) ;
y2 = y2 - ( youn0 * ( def0 - x2 ) ) ;
y1 = y2 ;
err1 = 'ABS' ( y0 - y1 ) ;
*
'REPETER' bloc0 ;
x2 = ( x0 + x1 ) / 2. ;
sigt = ( youn0 * ( def0 - x2 ) ) - sig_int ;
cont0 = ( youn0 * ( def0 - x2 ) ) ;
cont0 = cont0 / 3. ;
dpeq1 = XD0 * ( 'EXP' ( cont0 / SIG ) ) ;
tr2 = ( 1. - ( 2. * xnu ) ) * ( def0 - x2 ) ;
tr1 = treps0 - tr2 ;
'SI' ( tr1 '>' 1.E-5 ) ;
bet2 = 'LOG' ( ( ( 'EXP' tr1 ) - 1. + F0 ) / F0 ) ;
'SINON' ;
bet2 = tr1 / F0 ;
'FINSI' ;
B1 = SIG * F0 * ( 'EXP' bet2 ) ;
B1 = B1 / ( 1. - F0 + ( F0 * ( 'EXP' bet2 ) ) ) ;
tr1 = tr1 / 3. ;
y2 = sig0 * ( ( 1. + ( beta0 * ( x2 - tr1 ) ) ) ** xm0 ) ;
y2 = y2 -
( B1 * XD0 * ( 'EXP' ( youn0 * ( def0 - x2 )
/ ( SIG * 3. ) ) ) ) ;
y2 = y2 - ( youn0 * ( def0 - x2 ) ) ;
*
'SI' ( y2 '>' ( 1.E-4 ) ) ;
     x1 = x2 ;
'SINON' ;
     'SI' ( y2 '<' ( -1.E-4 ) ) ;
          x0 = x2 ;
     'SINON' ;
          def_th0 = x2 ;
          bet_th0 = bet2 ;
          sig_th0 = youn0 * ( def0 - def_th0 ) ;
          'QUITTER' bloc0 ;
     'FINSI' ;
'FINSI' ;
'FIN' bloc0 ;
*
*  Calcul du nouvel endommagement
*
*
def_int = def_th0 ;
bet_int = bet_th0 ;
sig_int = sig_th0 ;
*
*'MESS' '   Fin iteration interne no' i10 ;
*
'FIN' bloc1 ;
*
*bet_th0 = bet2 ;
*
rho_th0 = 1. / ( 1. - F0 + ( F0 * ( 'EXP' bet_th0 ) ) ) ;
*
'FINPROC' sig_th0 def_th0 bet_th0 rho_th0 ;
*
*
*================================================================
opti echo 0 dime 3 elem cub8 ;
*
*
*  Maillage
*
l1 = .5 ;
l2 = .01 ;
l3 = .01 ;
n1 = 50 ;
n2 = 1 ;
n3 = 1 ;
p1 = 0. 0. 0. ;
p2 = l1 0. 0. ;
p3 = l1 l2 0. ;
p4 = 0. l2 0. ;
p5 = 0. 0. l3 ;
p6 = l1 0. l3 ;
p7 = l1 l2 l3 ;
p8 = 0. l2 l3 ;
d1 = d p1 n3 p5 ;
d2 = d p5 n2 p8 ;
d3 = d p8 n3 p4 ;
d4 = d p4 n2 p1 ;
sur1 = 'DALL' d1 d2 d3 d4 ;
d5 = d p2 n3 p6 ;
d6 = d p6 n2 p7 ;
d7 = d p7 n3 p3 ;
d8 = d p3 n2 p2 ;
sur2 = 'DALL' d5 d6 d7 d8 ;
vol1 = sur1 'VOLU' n1 sur2 ;
titr ' Maillage du test de validation' ;
*trac vol1 ;
*
*  Deplacement maximal
*
depmax = .01 ;
*
*  Courbe d'ecrouissage
*
beta0 = 125. ;
sig0 = 410.E6 ;
xm = .1 ;
youn0 = 2.1E11 ;
epsp0 = 'PROG' 0. ;
deb0 = 'PROG' 0. ;
epsmax0 = depmax / l1 ;
pas0 = epsmax0 / 50 ;
pas1 = pas0 / 10. ;
epsmax1 = ( epsmax0 / 10. ) ;
epsp1 =  ( 'PROG' 0. 'PAS' pas1 epsmax1 ) 'ET'
( 'PROG' ( epsmax1 + pas0 )  'PAS' pas0 epsmax0 ) ;
*epsp1 = 'PROG' 0. 'PAS' pas0 epsmax0 ;
dim00 = 'DIME' epsp1 ;
un = 'PROG' dim00 '*' 1. ;
Y0 = sig0 ;
epsp2 = beta0 * epsp1 ;
epsp3 = epsp2 + un ;
epsp31 = log epsp3 ;
epsp32 = epsp31 * xm ;
epsp4 = exp epsp32 ;
Y1 = Y0 * epsp4 ;
*
epsp1 = epsp0 'ET' epsp1 ;
Y1 = deb0 'ET' Y1 ;
epsp2 = epsp1 + ( Y1 / youn0 ) ;
trac00 = 'EVOL' 'MANU' 'defo' epsp1 'sigm' Y1 ;
*
*    Modele de calcul
*
*trac0 = 'EVOL' 'MANU' defo ( 'PROG' 0. 0.004 .01 0.1)
*        sigm ( 'PROG' 0. 420.E6 580.E6 700.E6 ) ;
trac0 = 'EVOL' 'MANU' 'defo' epsp2 'sigm' Y1 ;
 TAB = 'TABLE' ;
 TAB. 1 = 'MARQ CROI ' ;
 TAB.'TITRE' = 'TABLE' ;
 TAB.'TITRE'. 1 = MOT 'TRACTION' ;
mod0 = 'MODE' vol1 'MECANIQUE' 'ELASTIQUE' 'ISOTROPE'
       'PLASTIQUE_ENDOM' 'ROUSSELIER' ;
mat0 = 'MATE' mod0 'YOUN' youn0 'NU' 0.3
       'TRAC' trac0 'F' 3.E-3 'FC' 1. 'D' 2. 'SIG1' 490.E6 ;
*
*    Conditions aux limites
*
cl1 = 'BLOQ' sur1 'UX' ;
cl2 = 'BLOQ' sur2 'UX' ;
cl3 = 'BLOQ' p1 'UX' 'UY' 'UZ' ;
cl4 = 'BLOQ' p5 'UX' 'UY' ;
cl5 = 'BLOQ' p4 'UX' 'UZ' ;
cl0 = cl1 'ET' cl2 'ET' cl3 'ET' cl4 'ET' cl5 ;
*
*    Chargement
*
dep1 = 'DEPI' cl2 depmax ;
ev0 = 'EVOL' 'MANU' temps ( 'PROG' 0. 1000. ) y ( 'PROG' 0. 1. ) ;
cha0 = 'CHAR' 'DIMP' dep1 ev0 ;
*
*  Temps du calcul
*
dt0 = 50. ;
tfin0 = 500. ;
*
*
*  Resolution par INCREPL
*---------------------------------------
*
ta1 = 'TABLE' ;
ta1 .'MODELE' = mod0 ;
ta1 .'CARACTERISTIQUES' = mat0 ;
ta1 .'BLOCAGES_MECANIQUES' = cl0 ;
ta1 .'CHARGEMENT' = cha0 ;
ta1 .'TEMPS_CALCULES' = ( 'PROG' 0. 'PAS' dt0 tfin0) ;
*                                                                     *
ta1 . temps                         = 'TABL' ;
ta1 . temps . 0                     = 0. ;
ta1 . deplacements                  = 'TABL' ;
ta1 . deplacements . 0              = 'ZERO' mod0 deplacements ;
ta1 . contraintes                   = 'TABL' ;
ta1 . contraintes . 0               = 'ZERO' mod0 contraintes ;
ta1 . variables_internes            = 'TABL' ;
ta1 . variables_internes . 0        = 'ZERO' mod0 varinter ;
ta1 . deformations_inelastiques     = 'TABL' ;
ta1 . deformations_inelastiques . 0 = 'ZERO' mod0 definela ;
*                                                                     *
TAB2                         = 'TABL' ;
TAB2 . 'MODELE'              = MOD0 ;
TAB2 . 'MATERIAUX'           = MAT0 ;
TAB2 . 'BLOCAGES_MECANIQUES' = CL0 ;
TAB2 . 'CHARGEMENT'          = CHA0 ;
TAB2 . 'MESSAGES'            = VRAI ;
TAB2 . 'K_TANGENT'           = VRAI ;
*                                                                     *
TAB2 . 'TEMPS_INI'           = 'EXTR' ta1.'TEMPS_CALCULES' 1 ;
NBR1     = ('DIME' ta1.'TEMPS_CALCULES') - 1 ;
'REPE' BR1 NBR1 ;
  TPSI2    = 'EXTR' ta1.'TEMPS_CALCULES' (&BR1 + 1) ;
  TAB2 . 'TEMPS_FIN'         = TPSI2 ;
  TAB2     = INCREPL TAB2 ;
  'SI' (&BR1 'EGA' 1) ;
    DEP2     = TAB2 . 'DU_FIN' ;
  'SINO' ;
    DEP2     = DEP2 + (TAB2 . 'DU_FIN') ;
  'FINS' ;
  ta1 . temps . &BR1                     = TPSI2 ;
  ta1 . deplacements . &BR1              = DEP2 ;
  ta1 . contraintes . &BR1               = TAB2 . 'SIGMA_FIN' ;
  ta1 . variables_internes . &BR1        = TAB2 . 'VARINT_FIN' ;
  ta1 . deformations_inelastiques . &BR1 = TAB2 . 'EPSIN_FIN' ;
'FIN' BR1 ;
*
*ta1 . 'MES_SAUVEGARDES'=TMASAU;
*TMASAU .'DEFTO'=VRAI;
*TMASAU .'DEFIN'=VRAI;
*TA1 . 'K_TANGENT' = VRAI ;
*TA1 . 'K_TANG_PERT' = VRAI ;
*PASAPAS ta1 ;
*
*
*  Post-traitement
*-----------------------------------------
*
*  Quelques donnees du calcul
*
mat0 = ta1 .'CARACTERISTIQUES' ;
youn1 = 'EXTR' ( 'EXCO' mat0 'YOUN' 'SCAL' ) 'SCAL' 1 1 1 ;
xnu0 = 'EXTR' ( 'EXCO' mat0 'NU' 'SCAL' ) 'SCAL' 1 1 1 ;
G0 = youn1 / ( 2. * ( 1. + xnu0 ) ) ;
XD0 = 'EXTR' ( 'EXCO' mat0 'D' 'SCAL' ) 'SCAL' 1 1 1 ;
XF0 = 'EXTR' ( 'EXCO' mat0 'F' 'SCAL' ) 'SCAL' 1 1 1 ;
SIG = 'EXTR' ( 'EXCO' mat0 'SIG1' 'SCAL' ) 'SCAL' 1 1 1 ;
*
*  Post-traitement
*-----------------------------------------
*
sigx1 = 'PROG' 0. ;
sigx2 = 'PROG' 0. ;
depx1 = 'PROG' 0. ;
depx2 = 'PROG' 0. ;
sig_1 = 'PROG' 0. ;
def_1 = 'PROG' 0. ;
bet_1 = 'PROG' 0. ;
rho_1 = 'PROG' 1. ;
def_th1 = 'PROG' 0. ;
sig_th1 = 'PROG' 0. ;
bet_th1 = 'PROG' 0. ;
rho_th1 = 'PROG' 1. ;
err_e1 = 'PROG' 0. ;
err_s1 = 'PROG' 0. ;
err_b1 = 'PROG' 0. ;
err_r1 = 'PROG' 0. ;
dim0 = 'DIME' ta1 .'TEMPS' - 1 ;
mod0 = ta1 .'MODELE' ;
sig1 = 0. ;
def1 = 0. ;
bet1 = 0. ;
rho1 = 1. ;
eps_el0 = sig0 / youn1 ;
mess ' eps_el0 = ' eps_el0 ;
'REPETER' bloc1 dim0 ;
  i1 = &bloc1 ;
  temp0 = ta1 .'TEMPS'.i1 ;
  mat0 = ta1 .'CARACTERISTIQUES' ;
  depl0 = ta1 .'DEPLACEMENTS'.i1 ;
  sigm0 = ta1 .'CONTRAINTES'.i1 ;
  depeq0 = ta1 .'VARIABLES_INTERNES'.i1 ;
  def0 = ta1 .'DEFORMATIONS_INELASTIQUES'.i1 ;
  sigx0 = 'MAXI' ( 'VMIS' mod0 sigm0 ) ;
  sigx00 = 'MINI' ( 'VMIS' mod0 sigm0 ) ;
  depx00 = 'MINI' ( 'EXCO' depeq0 'EPSE' 'SCAL' ) ;
  epsp0 = 'MAXI' ( 'EXCO' depeq0 'EPSE' 'SCAL' ) ;
  bet_0 = 'MAXI' ( 'EXCO' depeq0 'VHTA' 'SCAL' ) ;
  rho_0 = 'MAXI' ( 'EXCO' depeq0 'VHOT' 'SCAL' ) ;
  sig_00 = 'EXCO' sigm0 'SMXX' 'SCAL' ;
  sig_0 = 'EXTR' sig_00 'SCAL' 1 1 1 ;
  def_00 = 'EXCO' def0 'EIXX' 'SCAL' ;
  def_0 = 'EXTR' def_00 'SCAL' 1 1 1 ;
  sigx1 = sigx1 'ET' ( 'PROG' sigx0 ) ;
  sigx2 = sigx2 'ET' ( 'PROG' sigx00 ) ;
  depx1 = depx1 'ET' ( 'PROG' epsp0 ) ;
  depx2 = depx2 'ET' ( 'PROG' depx00 ) ;
  sig_1 = sig_1 'ET' ( 'PROG' sig_0 ) ;
  def_1 = def_1 'ET' ( 'PROG' def_0 ) ;
  bet_1 = bet_1 'ET' ( 'PROG' bet_0 ) ;
  rho_1 = rho_1 'ET' ( 'PROG' rho_0 ) ;
*
*  deformations totales
*
  eps0 = 'EPSI' mod0 depl0 ;
  eps_x = 'MAXI' ( 'EXCO' eps0 'EPXX' ) ;
*
*  Calcul de la solution th�orique
*
*B1 = SIG * XF0 * ( 'EXP' bet1 ) ;
*B1 = B1 / ( 1. - XF0 + ( XF0 * ( 'EXP' bet1 ) ) ) ;
B1 = SIG * XF0 ;
*F2 = B1 * XD0 * ( 'EXP' ( sig1 / ( 3. * SIG ) ) ) ;
F2 = B1 * XD0 * ( 'EXP' ( sig0 / ( 3. * SIG ) ) ) ;
F1 = sig0 ;
YLIM = F1 - F2 ;
sigt = youn1 * ( eps_x - def1 ) ;
'SI' ( sigt '>' YLIM ) ;
    sig1 = sig1 / rho1 ;
    sig_th0 def_th0 bet_th0 rho_th0 = PLROUSS ta1 beta0
    xm sig0 bet1 def1 sig1 i1 ;
    sig_th0 = sig_th0 * rho_th0 ;
'SINON' ;
    sig_th0 = sigt ;
    def_th0 = def1 ;
    bet_th0 = bet1 ;
    rho_th0 = rho1 ;
'FINSI' ;
*
sig1 = sig_th0 ;
def1 = def_th0 ;
bet1 = bet_th0 ;
rho1 = rho_th0 ;
*
def_th1 = def_th1 'ET' ( 'PROG' def_th0 ) ;
sig_th1 = sig_th1 'ET' ( 'PROG' sig_th0 ) ;
bet_th1 = bet_th1 'ET' ( 'PROG' bet_th0 ) ;
rho_th1 = rho_th1 'ET' ( 'PROG' rho_th0 ) ;
*
*  'MESS' ' deformation plastique theorique' def_th0 ;
*  'MESS' ' deformation plastique calculee ' def_0 ;
*  'MESS' ' contrainte th�orique           ' sig_th0 ;
*  'MESS' ' contrainte calculee            ' sig_0 ;
*  'MESS' ' endommagement th�orique        ' bet_th0 ;
*  'MESS' ' endommagement calcule          ' bet_0 ;
*  'MESS' ' fraction de densit� th�orique  ' rho_th0 ;
*  'MESS' ' fraction de densit� calculee   ' rho_0 ;
*
*  Calcul d'erreur
*
'SI' ( def_0 '>' ( 1.E-1 * eps_el0 ) ) ;
     err_e0 = ( def_th0 - def_0 ) / def_0 ;
     err_e0 = 'ABS' err_e0 ;
     err_e0 = err_e0 * 100. ;
'SINON' ;
     err_e0 = 0. ;
'FINSI' ;
'SI' ( sig_0 '>' 0. ) ;
     err_s0 = ( sig_th0 - sig_0 ) / sig_0 ;
     err_s0 = 'ABS' err_s0 ;
     err_s0 = err_s0 * 100. ;
'SINON' ;
     err_s0 = 0. ;
'FINSI' ;
'SI' ( sig_th0 '>' ( ( ( 9. * sig0 ) + SIG1 ) / 10. ) ) ;
     err_b0 = ( bet_th0 - bet_0 ) / bet_0 ;
     err_b0 = 'ABS' err_b0 ;
     err_b0 = err_b0 * 100. ;
'SINON' ;
     err_b0 = 0. ;
'FINSI' ;
'SI' ( err_e0 '>' 0. ) ;
     err_r0 = ( rho_th0 - rho_0 ) / rho_0 ;
     err_r0 = 'ABS' err_r0 ;
     err_r0 = err_r0 * 100. ;
'SINON' ;
     err_r0 = 0. ;
'FINSI' ;
*
err_e1 = err_e1 'ET' ( 'PROG' err_e0 ) ;
err_s1 = err_s1 'ET' ( 'PROG' err_s0 ) ;
err_b1 = err_b1 'ET' ( 'PROG' err_b0 ) ;
err_r1 = err_r1 'ET' ( 'PROG' err_r0 ) ;
*
'SI' ( err_e0 '>' 2.5E-2 ) ;
   'ERRE' 5 ;
'SINON' ;
   'ERRE' 0 ;
'FINSI' ;
'SI' ( err_s0 '>' 2.5E-2 ) ;
   'ERRE' 5 ;
'SINON' ;
   'ERRE' 0 ;
'FINSI' ;
'SI' ( err_b0 '>' 6.5 ) ;
   'ERRE' 5 ;
'SINON' ;
   'ERRE' 0 ;
'FINSI' ;
'SI' ( err_r0 '>' 2.5E-2 ) ;
   'ERRE' 5 ;
'SINON' ;
   'ERRE' 0 ;
'FINSI' ;
*
  'MESS' ' Fin du calcul de restitution, temps ' temp0 ;
*  'MESS' '  ' ;
*
'FIN' bloc1 ;
*
*  Trace
*
trac1 = 'EVOL' 'ROUG' 'MANU' 'epsp' depx1 'sigm' sigx1 ;
TAB = 'TABLE' ;
TAB.1 = 'MARQ CROI ' ;
TAB.2 = 'MARQ PLUS ' ;
TAB.'TITRE' = 'TABLE' ;
TAB.'TITRE'. 1 = MOT 'CALC' ;
TAB.'TITRE'. 2 = MOT 'TRACTION' ;
'SI' IDES1 ;
  'DESSIN' ( trac1 'ET' trac00 )
  'TITR' 'Contraintes - Deformation plastique'
  'LEGE' TAB ;
'FINS' ;
trac2 = 'EVOL' 'ROUG' 'MANU' 'epsp' depx2 'sigm' sigx2 ;
TAB = 'TABLE' ;
TAB.1 = 'MARQ CROI ' ;
TAB.2 = 'MARQ PLUS ' ;
TAB.'TITRE' = 'TABLE' ;
TAB.'TITRE'. 1 = MOT 'MAXI' ;
TAB.'TITRE'. 2 = MOT 'MINI' ;
'SI' IDES1 ;
  'DESSIN' ( trac1 'ET' trac2 )
  'TITR' 'Comparaison mini - maxi de la contrainte equivalente '
  'LEGE' TAB ;
'FINS' ;
trac3 = 'EVOL' 'ROUG' 'MANU' 'epsp' def_th1 'sigm' sig_th1 ;
trac4 = 'EVOL' 'ROUG' 'MANU' 'epsp' def_1 'sigm' sig_1 ;
TAB = 'TABLE' ;
TAB.1 = 'MARQ CROI ' ;
TAB.2 = 'MARQ PLUS ' ;
TAB.'TITRE' = 'TABLE' ;
TAB.'TITRE'. 1 = MOT 'THEORIE' ;
TAB.'TITRE'. 2 = MOT 'CALCUL' ;
'SI' IDES1 ;
  'DESSIN' ( trac3 'ET' trac4 )
  'TITR' 'Comparaison calcul theorie '
  'LEGE' TAB ;
'FINS' ;
trac5 = 'EVOL' 'ROUG' 'MANU' 'epsp' def_th1 'erreur%' err_s1 ;
trac6 = 'EVOL' 'ROUG' 'MANU' 'epsp' def_th1 'erreur%' err_e1 ;
TAB = 'TABLE' ;
TAB.1 = 'MARQ CROI ' ;
TAB.2 = 'MARQ PLUS ' ;
TAB.'TITRE' = 'TABLE' ;
TAB.'TITRE'. 1 = MOT 'CONTRAINTE' ;
TAB.'TITRE'. 2 = MOT 'DEFORMATION' ;
'SI' IDES1 ;
  'DESSIN' ( trac5 'ET' trac6 )
  'TITR' ' Evolution des erreurs '
  'LEGE' TAB ;
'FINS' ;
trac7 = 'EVOL' 'ROUG' 'MANU' 'epsp' def_th1 'erreur%' err_b1 ;
trac8 = 'EVOL' 'ROUG' 'MANU' 'epsp' def_th1 'erreur%' err_r1 ;
TAB = 'TABLE' ;
TAB.1 = 'MARQ CROI ' ;
TAB.2 = 'MARQ PLUS ' ;
TAB.'TITRE' = 'TABLE' ;
TAB.'TITRE'. 1 = MOT 'ENDOMMAGAMENT' ;
TAB.'TITRE'. 2 = MOT 'DENSITE' ;
'SI' IDES1 ;
  'DESSIN' ( trac7 'ET' trac8 )
  'TITR' ' Evolution des erreurs '
  'LEGE' TAB ;
'FINS' ;
TAB = 'TABLE' ;
TAB.1 = 'MARQ CROI ' ;
TAB.2 = 'MARQ PLUS ' ;
TAB.'TITRE' = 'TABLE' ;
TAB.'TITRE'. 1 = MOT 'THEORIE' ;
TAB.'TITRE'. 2 = MOT 'TRACTION' ;
'SI' IDES1 ;
  'DESSIN' ( trac3 'ET' trac00 )
  'TITR' 'Comparaison theorie traction '
  'LEGE' TAB ;
'FINS' ;
trac10 = 'EVOL' 'ROUG' 'MANU' 'epsp' def_th1 'beta'bet_1 ;
trac11 = 'EVOL' 'ROUG' 'MANU' 'epsp' def_th1 'beta'bet_th1 ;
TAB = 'TABLE' ;
TAB.1 = 'MARQ CROI ' ;
TAB.2 = 'MARQ PLUS ' ;
TAB.'TITRE' = 'TABLE' ;
TAB.'TITRE'. 1 = MOT 'THEORIE' ;
TAB.'TITRE'. 2 = MOT 'TRACTION' ;
'SI' IDES1 ;
  'DESSIN' ( trac11 'ET' trac10 )
  'TITR' 'Comparaison endommagement theorique et calcule '
  'LEGE' TAB ;
'FINS' ;
TAB = 'TABLE' ;
TAB.1 = 'MARQ CROI ' ;
TAB.2 = '  ' ;
TAB.'TITRE' = 'TABLE' ;
TAB.'TITRE'. 1 = MOT 'THEORIE' ;
TAB.'TITRE'. 2 = MOT 'TRACTION' ;
'SI' IDES1 ;
  'DESSIN' ( trac4 'ET' trac00 )
  'TITR' 'Comparaison calcul traction '
  'LEGE' TAB ;
'FINS' ;
*
*
'FIN' ;
